# OpenSim document version 40000
# Hybrid marker set for MeTRAbs bml_movi_87 skeleton (87 markers).
# Coordinates sourced from Pose2Sim SKEL, HALPE_26, and LSTM marker sets.
# Anatomical markers use SKEL positions; joint centers use HALPE_26/LSTM positions.
# Custom positions estimated for markers without direct equivalents.
MarkerSet:
  # HEAD (7 markers)
  # head (idx 67) - top of head - from HALPE_26 Head
  Marker head: head (0.0159224 0.164131 0) fixed=true
  # lfronthead (idx 5) - left front temple
  Marker lfronthead: head (0.065 0.12 -0.06) fixed=true
  # rfronthead (idx 36) - right front temple
  Marker rfronthead: head (0.065 0.12 0.06) fixed=true
  # lbackhead (idx 6) - left back of skull
  Marker lbackhead: head (-0.05 0.1 -0.045) fixed=true
  # rbackhead (idx 37) - right back of skull
  Marker rbackhead: head (-0.05 0.1 0.045) fixed=true
  # lcheek (idx 24) - left cheek - from LSTM LEye (approx)
  Marker lcheek: head (0.084464 0.0452599 -0.0311069) fixed=true
  # rcheek (idx 55) - right cheek - from LSTM REye (approx)
  Marker rcheek: head (0.084464 0.0452599 0.0311069) fixed=true
  # TORSO (12 markers)
  # backneck (idx 0) - C7 vertebra - from SKEL C7
  Marker backneck: torso (-0.07452119 0.3856704 0.003181386) fixed=true
  # upperback (idx 1) - upper back / lumbar - from SKEL LUMB
  Marker upperback: torso (-0.0799446 0.134934 0) fixed=true
  # clavicle (idx 2) - clavicle notch - from SKEL CLAV
  Marker clavicle: torso (0.05576895 0.3581936 -0.0003975182) fixed=true
  # sternum (idx 3) - mid-sternum - custom estimate between CLAV and LUMB
  Marker sternum: torso (0.1576922 0.2620691 0.00934025)
  # umbilicus (idx 4) - navel - custom estimate, anterior lower torso
  Marker umbilicus: torso (0.2013163 0.04994246 0.007391063)
  # lback (idx 7) - left back - from SKEL LBAC
  Marker lback: torso (-0.089714 0.3975115 -0.1126413)
  # rback (idx 38) - right back - from SKEL RBAC
  Marker rback: torso (-0.08261176 0.4007792 0.09643249)
  # lscapula (idx 34) - left scapula - from SKEL LSCA
  Marker lscapula: torso (-0.0899423 0.3645841 -0.0765236) fixed=true
  # rscapula (idx 65) - right scapula - from SKEL RSCA
  Marker rscapula: torso (-0.0899423 0.3630595 0.07652358) fixed=true
  # lbreast (idx 25) - left chest / rib - from SKEL RIBL
  Marker lbreast: torso (0.1457768 0.2690275 -0.09357817)
  # rbreast (idx 56) - right chest / rib - from SKEL RIBR
  Marker rbreast: torso (0.1544978 0.2732955 0.1092252)
  # thor (idx 70) - thorax center - from HALPE_26 Neck (approx)
  Marker thor: torso (-0.0008130659 0.4468969 0.0001848562) fixed=true
  # PELVIS (12 markers)
  # lasis (idx 15) - left ASIS - from SKEL LFWT
  Marker lasis: pelvis (0.003776944 0.01767012 -0.133638)
  # rasis (idx 46) - right ASIS - from SKEL RFWT
  Marker rasis: pelvis (0.01439086 0.02800977 0.1512543)
  # lpsis (idx 16) - left PSIS - from SKEL LBWT
  Marker lpsis: pelvis (-0.1659771 0.04344884 -0.03537643) fixed=true
  # rpsis (idx 47) - right PSIS - from SKEL RBWT
  Marker rpsis: pelvis (-0.1639884 0.0398533 0.04446041) fixed=true
  # mhip (idx 68) - mid hip center - from HALPE_26 Hip
  Marker mhip: pelvis (-0.0639274 -0.08134311 0) fixed=true
  # pelv (idx 69) - pelvis center - custom estimate, centroid of ASIS/PSIS
  Marker pelv: pelvis (-0.07027746 0.02948671 0.00184208)
  # lhip (idx 73) - left hip joint center - from LSTM LHJC_study
  Marker lhip: pelvis (-0.1244232 -0.05663981 -0.09999571)
  # rhip (idx 81) - right hip joint center - from LSTM RHJC_study
  Marker rhip: pelvis (-0.1178103 -0.0510804 0.1014101)
  # lwaist (idx 27) - left waist - custom estimate, lateral pelvis
  Marker lwaist: pelvis (-0.04168307 0.1893845 -0.167057)
  # rwaist (idx 58) - right waist - custom estimate, lateral pelvis
  Marker rwaist: pelvis (-0.02310043 0.200697 0.1501539)
  # lbum (idx 35) - left buttock - custom estimate, posterior pelvis
  Marker lbum: pelvis (-0.1600744 -0.1184274 -0.08004857)
  # rbum (idx 66) - right buttock - custom estimate, posterior pelvis
  Marker rbum: pelvis (-0.155993 -0.1133643 0.07884908)
  # LEFT ARM (10 markers)
  # lshom (idx 8) - left shoulder marker (acromion) - from SKEL LSHO
  Marker lshom: torso (0.0185392 0.4081277 -0.14923) fixed=true
  # lsho (idx 76) - left shoulder joint center - from HALPE_26 LShoulder
  Marker lsho: torso (-0.01275162 0.3663071 -0.2015742) fixed=true
  # lupperarm (idx 9) - left upper arm - from SKEL LHAP
  Marker lupperarm: humerus_l (0.005562959 -0.14679 0.01741573)
  # lelbm (idx 10) - left elbow lateral marker - from SKEL LELS
  Marker lelbm: humerus_l (0 -0.2842 0.04275382) fixed=true
  # lelbinner (idx 26) - left elbow medial - from SKEL LELSO
  Marker lelbinner: humerus_l (0.01543715 -0.285532 -0.03497439) fixed=true
  # lelb (idx 72) - left elbow joint center - from HALPE_26 LElbow
  Marker lelb: humerus_l (0.025 -0.2979545 0.008737653) fixed=true
  # lforearm (idx 11) - left forearm - from SKEL LFRM
  Marker lforearm: ulna_l (0.009848511 -0.1334688 -0.02286253)
  # lwrithumbside (idx 12) - left wrist radial - from SKEL LWRA
  Marker lwrithumbside: radius_l (-0.01323321 -0.2241369 -0.04566187) fixed=true
  # lwripinkieside (idx 13) - left wrist ulnar - from SKEL LWRB
  Marker lwripinkieside: ulna_l (-0.03899153 -0.2334535 -0.02164956) fixed=true
  # lwri (idx 77) - left wrist joint center - from HALPE_26 LWrist
  Marker lwri: radius_l (-0.0001735891 -0.235096 -0.009743795) fixed=true
  # RIGHT ARM (10 markers)
  # rshom (idx 39) - right shoulder marker (acromion) - from SKEL RSHO
  Marker rshom: torso (0.0185392 0.405992 0.1492301) fixed=true
  # rsho (idx 84) - right shoulder joint center - from HALPE_26 RShoulder
  Marker rsho: torso (-0.01275162 0.3663071 0.2015742) fixed=true
  # rupperarm (idx 40) - right upper arm - from SKEL RHAP
  Marker rupperarm: humerus_r (0.008356056 -0.1514692 -0.01491565)
  # relbm (idx 41) - right elbow lateral marker - from SKEL RELS
  Marker relbm: humerus_r (0 -0.2842 -0.04417234) fixed=true
  # relbinner (idx 57) - right elbow medial - from SKEL RELSO
  Marker relbinner: humerus_r (0.01363853 -0.285532 0.03389712) fixed=true
  # relb (idx 80) - right elbow joint center - from HALPE_26 RElbow
  Marker relb: humerus_r (0.025 -0.2979545 -0.008737653) fixed=true
  # rforearm (idx 42) - right forearm - from SKEL RFRM
  Marker rforearm: ulna_r (0.004138372 -0.1401319 0.008700653)
  # rwrithumbside (idx 43) - right wrist radial - from SKEL RWRA
  Marker rwrithumbside: radius_r (-0.008795479 -0.232909 0.04461181) fixed=true
  # rwripinkieside (idx 44) - right wrist ulnar - from SKEL RWRB
  Marker rwripinkieside: ulna_r (-0.03841988 -0.2408677 0.02057312) fixed=true
  # rwri (idx 85) - right wrist joint center - from HALPE_26 RWrist
  Marker rwri: radius_r (-0.0001735891 -0.235096 0.009743795) fixed=true
  # LEFT HAND (3 markers)
  # lfin (idx 14) - left fingers/middle finger - from SKEL LFIN
  Marker lfin: hand_l (-0.01396465 -0.08435236 0.005839852) fixed=true
  # lthumb (idx 28) - left thumb - from SKEL LHTH
  Marker lthumb: hand_l (0.01208233 -0.0467433 -0.05687836) fixed=true
  # lhan (idx 74) - left hand center - from LSTM LIndex
  Marker lhan: hand_l (0.002109783 -0.0541428 -0.01492688)
  # RIGHT HAND (3 markers)
  # rfin (idx 45) - right fingers/middle finger - from SKEL RFIN
  Marker rfin: hand_r (-0.004294943 -0.08591573 0.001617945) fixed=true
  # rthumb (idx 59) - right thumb - from SKEL RHTH
  Marker rthumb: hand_r (0.005382228 -0.04683503 0.05791159) fixed=true
  # rhan (idx 82) - right hand center - from LSTM RIndex
  Marker rhan: hand_r (0.00831941 -0.05277063 0.01980211)
  # LEFT THIGH (6 markers)
  # lfrontthigh (idx 17) - left front thigh - from SKEL LFFT
  Marker lfrontthigh: femur_l (0.09898601 -0.2063663 0.04163836)
  # lthigh (idx 18) - left lateral thigh - from SKEL LFLT
  Marker lthigh: femur_l (0.03288243 -0.07200304 -0.05899314)
  # lfrontinnerthigh (idx 29) - left front inner thigh - from SKEL LFMT
  Marker lfrontinnerthigh: femur_l (0.06428827 -0.3294949 0.07690937)
  # lknem (idx 19) - left knee lateral marker - from SKEL LKNE
  Marker lknem: femur_l (-0.006294452 -0.4074308 -0.04564024) fixed=true
  # linnerknee (idx 30) - left knee medial - from SKEL LKNI
  Marker linnerknee: femur_l (-0.001169212 -0.408059 0.04655466) fixed=true
  # lkne (idx 75) - left knee joint center - from HALPE_26 LKnee
  Marker lkne: femur_l (-0.00541048 -0.397886 -0.000611877) fixed=true
  # RIGHT THIGH (6 markers)
  # rfrontthigh (idx 48) - right front thigh - from SKEL RFFT
  Marker rfrontthigh: femur_r (0.09653661 -0.1962807 -0.02581274)
  # rthigh (idx 49) - right lateral thigh - from SKEL RFLT
  Marker rthigh: femur_r (0.0454699 -0.07231373 0.0703)
  # rfrontinnerthigh (idx 60) - right front inner thigh - from SKEL RFMT
  Marker rfrontinnerthigh: femur_r (0.05516392 -0.3094412 -0.05797076)
  # rknem (idx 50) - right knee lateral marker - from SKEL RKNE
  Marker rknem: femur_r (0.002547119 -0.4100252 0.04999875) fixed=true
  # rinnerknee (idx 61) - right knee medial - from SKEL RKNI
  Marker rinnerknee: femur_r (-0.004129908 -0.4023856 -0.0452848) fixed=true
  # rkne (idx 83) - right knee joint center - from HALPE_26 RKnee
  Marker rkne: femur_r (-0.00541048 -0.397886 0.000611877) fixed=true
  # LEFT TIBIA (3 markers)
  # lshin (idx 31) - left shin - from SKEL LSHN
  Marker lshin: tibia_l (-0.04748743 -0.15604 -0.0474687)
  # lankm (idx 20) - left ankle lateral marker - from SKEL LANK
  Marker lankm: tibia_l (-0.003261357 -0.4123452 -0.04849712) fixed=true
  # lank (idx 71) - left ankle joint center - from HALPE_26 LAnkle
  Marker lank: tibia_l (-0.0002863098 -0.40805 -0.01495955) fixed=true
  # RIGHT TIBIA (3 markers)
  # rshin (idx 62) - right shin - from SKEL RSHN
  Marker rshin: tibia_r (-0.05114832 -0.1540001 0.05156213)
  # rankm (idx 51) - right ankle lateral marker - from SKEL RANK
  Marker rankm: tibia_r (-0.01822213 -0.4169408 0.04690753) fixed=true
  # rank (idx 79) - right ankle joint center - from HALPE_26 RAnkle
  Marker rank: tibia_r (-0.0002863098 -0.40805 0.01495955) fixed=true
  # LEFT FOOT (6 markers)
  # lhee (idx 21) - left heel - from SKEL LHEE
  Marker lhee: calcn_l (-0.01329385 0.01602225 0.004569673) fixed=true
  # lfifthmetatarsal (idx 22) - left 5th metatarsal - from SKEL LMT5
  Marker lfifthmetatarsal: calcn_l (0.1464528 0.001105075 -0.0467793)
  # ltoe (idx 23) - left big toe - from SKEL LTOE
  Marker ltoe: toes_l (0.065004 7.6e-5 0.01199) fixed=true
  # lfirstmetatarsal (idx 32) - left 1st metatarsal - from SKEL LFPI
  Marker lfirstmetatarsal: toes_l (0.0132 -0.006719 -0.051954) fixed=true
  # lfourthtoe (idx 33) - left 4th toe - custom estimate between LTOE and LSmallToe
  Marker lfourthtoe: toes_l (0.04761141 -0.006893734 -0.03692592)
  # lfoo (idx 78) - left foot center - from HALPE_26 LBigToe (approx)
  Marker lfoo: toes_l (0.0646643 0.009869336 0.01458025) fixed=true
  # RIGHT FOOT (6 markers)
  # rhee (idx 52) - right heel - from SKEL RHEE
  Marker rhee: calcn_r (-0.01329412 0.01790035 0.0006192976) fixed=true
  # rfifthmetatarsal (idx 53) - right 5th metatarsal - from SKEL RMT5
  Marker rfifthmetatarsal: calcn_r (0.1482327 -0.001090488 0.03983928)
  # rtoe (idx 54) - right big toe - from SKEL RTOE
  Marker rtoe: toes_r (0.065004 7.6e-5 -0.01199) fixed=true
  # rfirstmetatarsal (idx 63) - right 1st metatarsal - from SKEL RFPI
  Marker rfirstmetatarsal: toes_r (0.0132 -0.006719 0.051954) fixed=true
  # rfourthtoe (idx 64) - right 4th toe - custom estimate
  Marker rfourthtoe: toes_r (0.05048056 -0.00702665 0.03386055)
  # rfoo (idx 86) - right foot center - from HALPE_26 RBigToe (approx)
  Marker rfoo: toes_r (0.0646643 0.009869336 -0.01458025) fixed=true
