# OpenSim document version 40500
ScaleTool Pose2Sim_scaled:
  mass: 69
  height: -1
  age: -1
  notes: Scaling setup for MeTRAbs bml_movi_87 skeleton
  ModelScaler:
    apply: true
    scaling_order: measurements
    time_range: 0 1
    preserve_mass_distribution: true
    MeasurementSet:
      # FOOT: heel-to-toe and heel-to-5th metatarsal
      Measurement foot: apply=true
        MarkerPair: markers=(rhee rtoe)
        MarkerPair: markers=(rhee rfifthmetatarsal)
        MarkerPair: markers=(lhee ltoe)
        MarkerPair: markers=(lhee lfifthmetatarsal)
        BodyScale talus_r: axes=(X Y Z)
        BodyScale calcn_r: axes=(X Y Z)
        BodyScale toes_r: axes=(X Y Z)
        BodyScale talus_l: axes=(X Y Z)
        BodyScale calcn_l: axes=(X Y Z)
        BodyScale toes_l: axes=(X Y Z)
      # RIGHT TIBIA: knee-to-ankle (lateral and medial pairs)
      Measurement tibia_r: apply=true
        MarkerPair: markers=(rknem rankm)
        MarkerPair: markers=(rinnerknee rank)
        BodyScale tibia_r: axes=(X Y Z)
      # LEFT TIBIA
      Measurement tibia_l: apply=true
        MarkerPair: markers=(lknem lankm)
        MarkerPair: markers=(linnerknee lank)
        BodyScale tibia_l: axes=(X Y Z)
      # RIGHT FEMUR: hip joint center to knee
      Measurement femur_r: apply=true
        MarkerPair: markers=(rhip rknem)
        BodyScale femur_r: axes=(X Y Z)
        BodyScale patella_r: axes=(X Y Z)
      # LEFT FEMUR
      Measurement femur_l: apply=true
        MarkerPair: markers=(lhip lknem)
        BodyScale femur_l: axes=(X Y Z)
        BodyScale patella_l: axes=(X Y Z)
      # PELVIS XY: ASIS-PSIS depth
      Measurement pelvisXY: apply=true
        MarkerPair: markers=(rasis rpsis)
        MarkerPair: markers=(lasis lpsis)
        BodyScale pelvis: axes=(X Y)
      # PELVIS Z: inter-hip width
      Measurement pelvisZ: apply=true
        MarkerPair: markers=(rhip lhip)
        BodyScale pelvis: axes=Z
      # TORSO XY: prefer pure vertical pairs (C7/clavicle to mid-hip)
      # to avoid biasing torso scaling with shoulder lateral offset
      Measurement torsoXY: apply=true
        # Pure vertical: trunk height
        MarkerPair: markers=(backneck mhip)
        MarkerPair: markers=(clavicle mhip)
        MarkerPair: markers=(backneck pelv)
        # Diagonal (kept for redundancy)
        MarkerPair: markers=(backneck rpsis)
        MarkerPair: markers=(backneck lpsis)
        MarkerPair: markers=(rshom rpsis)
        MarkerPair: markers=(lshom lpsis)
        BodyScale torso: axes=(X Y)
        BodyScale scapulaPhantom_r: axes=(X Y)
        BodyScale scapulaPhantom_l: axes=(X Y)
        BodyScale lumbar5: axes=(X Y)
        BodyScale lumbar4: axes=(X Y)
        BodyScale lumbar3: axes=(X Y)
        BodyScale lumbar2: axes=(X Y)
        BodyScale lumbar1: axes=(X Y)
        BodyScale Abdomen: axes=(X Y)
        BodyScale head: axes=(X Y)
        BodyScale sacrum: axes=(X Y)
      # TORSO Z: inter-shoulder width
      Measurement torsoZ: apply=true
        MarkerPair: markers=(rshom lshom)
        BodyScale torso: axes=Z
        BodyScale scapulaPhantom_r: axes=Z
        BodyScale scapulaPhantom_l: axes=Z
        BodyScale lumbar5: axes=Z
        BodyScale lumbar4: axes=Z
        BodyScale lumbar3: axes=Z
        BodyScale lumbar2: axes=Z
        BodyScale lumbar1: axes=Z
        BodyScale Abdomen: axes=Z
        BodyScale head: axes=Z
        BodyScale sacrum: axes=Z
      # HUMERUS: shoulder-to-elbow (lateral and medial)
      Measurement humerus: apply=true
        MarkerPair: markers=(rshom relbm)
        MarkerPair: markers=(rshom relbinner)
        MarkerPair: markers=(lshom lelbm)
        MarkerPair: markers=(lshom lelbinner)
        BodyScale humerus_r: axes=(X Y Z)
        BodyScale humerus_l: axes=(X Y Z)
      # RADIUS/ULNA/HAND: elbow-to-wrist (radial and ulnar)
      Measurement radius: apply=true
        MarkerPair: markers=(relbm rwrithumbside)
        MarkerPair: markers=(relbinner rwripinkieside)
        MarkerPair: markers=(lelbm lwrithumbside)
        MarkerPair: markers=(lelbinner lwripinkieside)
        BodyScale ulna_r: axes=(X Y Z)
        BodyScale radius_r: axes=(X Y Z)
        BodyScale hand_r: axes=(X Y Z)
        BodyScale ulna_l: axes=(X Y Z)
        BodyScale radius_l: axes=(X Y Z)
        BodyScale hand_l: axes=(X Y Z)
  MarkerPlacer:
    apply: true
    max_marker_movement: -1
